// SBML level 2 version 4

model Test_enz()
  // Test enz

  // Compartments:
  compartment Cell_body = 1;

  // Species:
  species None in Cell_body = 0;
  species DAT in Cell_body = 1;
  species AC1 in Cell_body = 0.09;
  species AC1tot in Cell_body;
  species DA in Cell_body = 0;
  species D2R in Cell_body = 0.18;
  species DA_D2R in Cell_body = 0;
  species Gbc in Cell_body = 6;
  species Gi_GDP in Cell_body = 0;
  species Gi_GTP in Cell_body = 0;
  species Gi_Gbc in Cell_body = 9;
  species AC1_Gi_GDP in Cell_body = 0;
  species AC1_Gi_GTP in Cell_body = 0;
  species $Golf_tot in Cell_body = 0.8;
  species Golf in Cell_body = 0.8;
  species Golf_AC1 in Cell_body = 0;
  species RGS in Cell_body = 0.9;
  species AC2 in Cell_body = 1;
  species Golf_AC2 in Cell_body = 0;
  species Golf_bound in Cell_body;
  species Gitot in Cell_body = 9;
  species ACtot in Cell_body = 0.09;
  species ACprimed in Cell_body;

  // Parameters:
  Zero = 0;
  Km_DAT = 0.2;
  kcat_DAT = 8.9;
  DA_opto = 0.841;
  kf_DA_D2R = 10;
  kb_DA_D2R = 100;
  Km_exch_Gi = 0.01;
  kcat_exch_Gi = 230;
  Km_hyd_Gi = 12;
  kcat_hyd_Gi = 90;
  kon_AC_GiGTP = 200;
  koff_AC_GiGTP = 8;
  kon_AC_GiGDP = 20;
  koff_AC_GiGDP = 21.6;
  kon_AC_Golf = 20;
  koff_AC_Golf = 20;
  kon_Gbc_Gi = 10;
  duration_DA = 2900;
  Toffset_DA = 100;
  DA_dip = 0.05;
  DA_basal = 0.5;

  // Assignment rules:
  Golf_bound := ;
  AC1tot := AC1 + AC1_Gi_GTP + AC1_Gi_GDP;
  ACprimed := Golf_AC2*AC1/AC1tot/Golf_bound;

  // Reactions:
  Reaction_1: D2R => DA_D2R; kf_DA_D2R*D2R*DA;
  Reaction_2: DA_D2R => D2R; kb_DA_D2R*DA_D2R;
  Reaction_3: Gi_GDP => Gi_Gbc; kon_Gbc_Gi*Gi_GDP*Gbc;
  Reaction_4: Gi_Gbc => Gi_GTP; kcat_exch_Gi*Gi_Gbc*DA_D2R/(Km_exch_Gi + Gi_Gbc);
  Reaction_5: Gi_GTP => Gi_GDP; kcat_hyd_Gi*Gi_GTP*RGS/(Km_hyd_Gi + Gi_GTP);
  Reaction_6: AC1_Gi_GTP => AC1_Gi_GDP; kcat_hyd_Gi*AC1_Gi_GTP*RGS/(Km_hyd_Gi + AC1_Gi_GTP);
  Reaction_7: Gi_GTP + AC1 -> AC1_Gi_GTP; kon_AC_GiGTP*Gi_GTP*AC1 - koff_AC_GiGTP*AC1_Gi_GTP;
  Reaction_8: AC1_Gi_GDP -> AC1 + Gi_GDP; koff_AC_GiGDP*AC1_Gi_GDP - kon_AC_GiGDP*AC1*Gi_GDP;
  Reaction_9: AC2 => Golf_AC2; kon_AC_Golf*AC2*Golf;
  Reaction_10: Golf_AC2 => AC2; koff_AC_Golf*Golf_AC2;

  // Events:
  event_56: at (time > 0): DA = DA_basal;
  event_57: at (time >= Toffset_DA + 0): DA = DA_dip;
  event_58: at (time >= Toffset_DA + duration_DA): DA = DA_basal;
end
